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# Grøn led
# Forward voltage:
Vled := 2.4 V
# Current at Vled:
I_C := 35 mA
β := 110
Vcc := 5 V
Vce := 0.2 V
V_Rled := Vcc - Vled - Vce → 5*V - 0.2*V - 2.4*V = 2.4 V
R_led := V_Rled/I_C → 0.0685714285714*V/mA = 68.5714 Ω
I_B := I_C/β = 0.318182 mA
Vbe := 0.7 V
R_B := (Vcc - Vbe)/I_B = 13.5143 kΩ
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# rød led
# Forward voltage:
Vled := 2.5 V
# Current at Vled:
I_C := 30 mA
β := 110
Vcc := 5 V
Vce := 0.2 V
V_Rled := Vcc - Vled - Vce → 5*V - 0.2*V - 2.5*V = 2.3 V
R_led := V_Rled/I_C → 0.0766666666667*V/mA = 76.6667 Ω
I_B := I_C/β = 0.272727 mA
Vbe := 0.7 V
R_B := (Vcc - Vbe)/I_B = 15.7667 kΩ
